# SPH example with mesh
variable      mass universe 0.001
variable      h universe 0.012

variable      lat equal $h/1.2
variable      lathalf equal ${lat}*0.5
variable      wallpos equal 0.1+${lathalf}
variable      skin equal $h*0.25
variable      eta equal 0.01*$h*$h

variable      ins01 equal 0.1-${lat}
variable      ins05 equal 0.5-${lat}

atom_style    sph
atom_modify   map array sort 0 0
communicate   single vel yes

boundary      f f f
newton        off
#processors    2 1 1

units         si
lattice       sc ${lat}

region        reg block 0. 0.5     0. 0.1    0. 0.5 units box
create_box    1 reg

region        insreg block ${lat} 0.1   ${lat} ${ins01}   ${lat} 0.2 units box
region        insreg2 block 0.10001 ${ins05}   ${lat} ${ins01}   ${lat} 0.05 units box
create_atoms  1 region insreg
create_atoms  1 region insreg2
mass          1 ${mass}

neighbor      ${skin} bin

fix           m1 all property/global speedOfSound peratomtype 20.
fix           m2 all property/global sl peratomtype $h

fix           m3 all property/global artViscAlpha  peratomtype 4.1666e-3
fix           m4 all property/global artViscBeta   peratomtype 0.
fix           m5 all property/global artViscEta    scalar      0.

#sph pair style
# mhu = 1e-3 (water) ~ alpha * cAB * h
# for c=20 (10*vMax) and h=0.012 --> alpha=0.004166667
# pair_style    sph kernel_style h [artVisc alpha beta cAB eta] [tensCorr epsilon]
# artifical viscosity [Monaghan and Gingold (1983)] and tensile correction [Monaghan (2000)]

#pair_style 	  sph/artVisc/tensCorr cubicspline $h artVisc 4.1666e-3 0. ${eta} tensCorr 0.2 ${lat}
pair_style 	  sph/artVisc/tensCorr cubicspline $h artVisc
#tensCorr 0.2 ${lat}
pair_coeff	  * *

#sph fixes
# density
fix           density all sph/density/continuity
fix           corr all sph/density/corr shepard every 30
set           group all meso_rho 1000

# pressure
# fix         id group style type [if Tait: B rho0 gamma] (according to Monaghan 1994)
# B = c^2*rho0/gamma
# for c=20 --> B~60000
fix		        pressure all sph/pressure Tait 60000. 1000. 7.

fix			plate all mesh/surface file meshes/test.stl type 1

#box wall
region        boxw block 0. 0.5  0. 0.1  0. 0.5 units box
# fix         id group wall/region/sph region_id r0 D (repulsive force similar to Lennard-Jones potential p1=4, p2=2)
fix           boxwall_reg all wall/region/sph boxw ${lat} 5.0

fix			  meshwall all wall/sph/general/simple mesh   n_meshes 1  meshes  plate    store_force yes  r0 ${lathalf}  D 1.0

# time integration
# for c=20 --> dt~1e-5
timestep      1e-5
fix           integr all nve/sph

#gravity
fix           gravi all gravity 9.81 vector 0.0 0.0 -1.0

# set sph kernels for all fix after all fixes are defined
set        group all sphkernel cubicspline

#output settings, include total thermal energy
thermo_style	custom step atoms ke vol cpu
thermo          500
thermo_modify	lost ignore norm no
compute_modify	thermo_temp dynamic yes
dump			dmp all custom 500 post/dump*.sph id type type x y z ix iy iz vx vy vz fx fy fz vx vy vz p rho f_force_meshwall[1] f_force_meshwall[2] f_force_meshwall[3]

compute forceXave all reduce ave f_force_meshwall[1]
compute forceYave all reduce ave f_force_meshwall[2]
compute forceZave all reduce ave f_force_meshwall[3]
variable forceX equal c_forceXave
variable forceY equal c_forceYave
variable forceZ equal c_forceZave
variable time equal step*dt
fix				dmpTH all print 500 "${time} ${forceX} ${forceY} ${forceZ}" screen no title "t Fx Fy Fz" file post/force_meshwall.txt

run           50000
